*Heading
** Job name: BuckleCylinder Model name: Model-1
** Generated by: Abaqus/CAE Learning Edition 2025
*Preprint, echo=NO, model=NO, history=NO, contact=NO
**
** PARTS
**
*Part, name=Cylinder
*Node
      1,   95.5572815,  -29.4755173,         500.
      2,   82.6238785,  -56.3320045,         500.
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*Element, type=S4
  1,  21,   1,  22,  42
  2,   1,   2,  23,  22
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*Nset, nset=_PickedSet2, internal, generate
   1,  378,    1
*Elset, elset=_PickedSet2, internal, generate
   1,  357,    1
** Section: Section-1
*Shell Section, elset=_PickedSet2, material=Steel
2., 5
*End Part
**
**
** ASSEMBLY
**
*Assembly, name=Assembly
**
*Instance, name=Cylinder-1, part=Cylinder
*End Instance
**
*Nset, nset=Bottom, instance=Cylinder-1, generate
 358,  378,    1
*Elset, elset=Bottom, instance=Cylinder-1, generate
 337,  357,    1
*Elset, elset=_Top_E1, internal, instance=Cylinder-1, generate
  1,  21,   1
*Surface, type=ELEMENT, name=Top
_Top_E1, E1
*End Assembly
**
** MATERIALS
**
*Material, name=Steel
*Elastic
200000., 0.3
**
** BOUNDARY CONDITIONS
**
** Name: BC-1 Type: Symmetry/Antisymmetry/Encastre
*Boundary
Bottom, ENCASTRE
** ----------------------------------------------------------------
**
** STEP: Step-1
**
*Step, name=Step-1, nlgeom=NO, perturbation
*Buckle
1, , 3, 50
**
** BOUNDARY CONDITIONS
**
** Name: BC-1 Type: Symmetry/Antisymmetry/Encastre
*Boundary, op=NEW, load case=1
Bottom, ENCASTRE
*Boundary, op=NEW, load case=2
Bottom, ENCASTRE
**
** LOADS
**
** Name: Load-1   Type: Shell edge load
*Dsload
Top, EDNOR, -1.59155
**
** OUTPUT REQUESTS
**
*Restart, write, frequency=0
**
** FIELD OUTPUT: F-Output-1
**
*Output, field, variable=PRESELECT
*End Step
